28.10.2025
13:05
$PROBLEM ZERBAXA

$INPUT ID NUM TIME DV AMT RATE ADDL II CMT MDV EVID HEIGHT BW SEX AGE SOFA PCT ECMO CRRT ELWI CI CRE ALB PROTEIN

$DATA ..\..\..\..\data\derived\RawData.csv IGNORE=I

$SUBROUTINE ADVAN6 TOL=9

$MODEL
COMP=(DEPOT1)  ;1-CEFTOLOZAN CENTR
COMP=(PER1)    ;2
COMP=(DEPOT2)  ;3-TAZOBAKTAM CENTR

$PK

   BSA =  0.20247*(HEIGHT/100)**0.725*BW**0.425 ;(DuBois & DuBois)
   CLCR = (140-AGE)*BW/72/CRE*0.85**(SEX)       ;(Cockcroft-Gault formula)
   CO = CI*BSA;

   V1C=THETA(1)*EXP(ETA(1))
   CLC=THETA(2)*EXP(ETA(2))
   V1T=THETA(3)*EXP(ETA(3))
   CLT=THETA(4)*EXP(THETA(5)*ETA(3))

$DES
   AC1=A(1)/V1C
   AT1=A(3)/V1T
   DADT(1)= -CLC*AC1
   DADT(2)= 0
   DADT(3)= -CLT*AT1

$ERROR

IF(CMT.EQ.1) THEN
IPRED=A(1)/V1C
Y=IPRED*(1+EPS(1))
ENDIF
IF(CMT.EQ.3) THEN
IPRED=A(3)/V1T
Y=IPRED*(1+EPS(2))
ENDIF

$THETA
(0,20.7)    ;V1C  [L]
(0,6.28)    ;CLC  [L/h]
(0,36.)     ;V1T  [L]
(0,15.9)    ;CLT  [L/h]
(0,0.267)   ;SDCLT:SDv1T

$OMEGA BLOCK(3)
0.205             ;11 ETA-V1C
0.1  0.257        ;22 ETA-CL1C
0.1  0.1  0.507   ;33 ETA-V1T

;--------SIGMAS
$SIGMA 0.2 ; 11 PROPC, %
$SIGMA 0.2 ; 22 PROPT, %

$ESTIMATION METHOD=1 INTER NOABORT MAXEVAL=9990 NSIG=3 SIGL=9 PRINT=2
$COV

$TABLE ID NUM TIME MDV IPRED CWRES EVID CMT NPDE
NOPRINT ONEHEADER FILE=SDTAB.DAT

$TABLE ID NUM V1C CLC V1T CLT ETA1 ETA2 ETA3
NOAPPEND NOPRINT ONEHEADER FILE=PATAB.DAT

$TABLE ID NUM HEIGHT CLCR BW AGE SOFA PCT CRRT ELWI CI CRE ALB PROTEIN CO BSA
NOAPPEND NOPRINT ONEHEADER FILE=COTAB.DAT

$TABLE ID NUM SEX ECMO
NOAPPEND NOPRINT ONEHEADER FILE=CATAB.DAT

NM-TRAN MESSAGES
 WARNINGS AND ERRORS (IF ANY) FOR PROBLEM    1
 (WARNING  2) NM-TRAN INFERS THAT THE DATA ARE POPULATION.
 (WARNING  3) THERE MAY BE AN ERROR IN THE ABBREVIATED CODE. THE FOLLOWING
 ONE OR MORE RANDOM VARIABLES ARE DEFINED WITH "IF" STATEMENTS THAT DO NOT
 PROVIDE DEFINITIONS FOR BOTH THE "THEN" AND "ELSE" CASES. IF ALL
 CONDITIONS FAIL, THE VALUES OF THESE VARIABLES WILL BE ZERO.
   IPRED Y
 LIM VALUES MAXLIM ASSESSED BY NMTRAN: 1,2,3,4,5,6,7,8,10,11,13,15,16
Note: Analytical 2nd Derivatives are constructed in FSUBS but are never used.
      You may insert $ABBR DERIV2=NO after the first $PROB to save FSUBS construction and compilation time

1NONLINEAR MIXED EFFECTS MODEL PROGRAM (NONMEM) VERSION 7.5.1
 ORIGINALLY DEVELOPED BY STUART BEAL, LEWIS SHEINER, AND ALISON BOECKMANN
 CURRENT DEVELOPERS ARE ROBERT BAUER, ICON DEVELOPMENT SOLUTIONS,
 AND ALISON BOECKMANN. IMPLEMENTATION, EFFICIENCY, AND STANDARDIZATION
 PERFORMED BY NOUS INFOSYSTEMS.
 PROBLEM NO.:         1
 ZERBAXA
 TOT. NO. OF OBS RECS:      191
 TOT. NO. OF INDIVIDUALS:       13
 GENERAL NONLINEAR KINETICS MODEL (DVERK1, ADVAN6)
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 #TBLN:      1
 #METH: First Order Conditional Estimation with Interaction
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
 #TERM:
0MINIMIZATION SUCCESSFUL
 NO. OF FUNCTION EVALUATIONS USED:      378
 NO. OF SIG. DIGITS IN FINAL EST.:  3.5

 ETABAR IS THE ARITHMETIC MEAN OF THE ETA-ESTIMATES,
 AND THE P-VALUE IS GIVEN FOR THE NULL HYPOTHESIS THAT THE TRUE MEAN IS 0.

 ETABAR:        -1.2302E-02  2.9935E-03 -6.3870E-04
 SE:             8.1377E-02  1.3595E-01  1.3095E-01
 N:                      13          13          13

 P VAL.:         8.7984E-01  9.8243E-01  9.9611E-01

 ETASHRINKSD(%)  9.0825E+00  1.7174E+00  2.5710E+00
 ETASHRINKVR(%)  1.7340E+01  3.4053E+00  5.0758E+00
 EBVSHRINKSD(%)  9.0523E+00  1.2839E+00  2.5517E+00
 EBVSHRINKVR(%)  1.7285E+01  2.5513E+00  5.0384E+00
 RELATIVEINF(%)  6.4671E+01  9.3475E+01  8.3154E+01
 EPSSHRINKSD(%)  9.6720E+00  5.5609E+00
 EPSSHRINKVR(%)  1.8408E+01  1.0812E+01


 TOTAL DATA POINTS NORMALLY DISTRIBUTED (N):          191
 N*LOG(2PI) CONSTANT TO OBJECTIVE FUNCTION:    351.03451968418494
 OBJECTIVE FUNCTION VALUE WITHOUT CONSTANT:    820.49992238476489
 OBJECTIVE FUNCTION VALUE WITH CONSTANT:       1171.5344420689498
 REPORTED OBJECTIVE FUNCTION DOES NOT CONTAIN CONSTANT

 TOTAL EFFECTIVE ETAS (NIND*NETA):                            39


 #TERE:
 Elapsed estimation  time in seconds:   149.61
 Elapsed covariance  time in seconds:   112.48
 Elapsed postprocess time in seconds:     5.47

 ********************               FIRST ORDER CONDITIONAL ESTIMATION WITH INTERACTION              ********************
 #OBJT:**************                       MINIMUM VALUE OF OBJECTIVE FUNCTION                      ********************
 #OBJV:********************************************      820.500       **************************************************

 ********************               FIRST ORDER CONDITIONAL ESTIMATION WITH INTERACTION              ********************
 ********************                             FINAL PARAMETER ESTIMATE                           ********************

 THETA - VECTOR OF FIXED EFFECTS PARAMETERS   *********
         TH 1      TH 2      TH 3      TH 4      TH 5
         3.02E+01  6.37E+00  5.54E+01  1.55E+01  8.12E-01

 OMEGA - COV MATRIX FOR RANDOM EFFECTS - ETAS  ********
         ETA1      ETA2      ETA3
 ETA1
+        1.04E-01
 ETA2
+        9.93E-02  2.49E-01
 ETA3
+        1.12E-01  1.90E-01  2.35E-01

 SIGMA - COV MATRIX FOR RANDOM EFFECTS - EPSILONS  ****
         EPS1      EPS2
 EPS1
+        4.48E-02
 EPS2
+        0.00E+00  7.22E-02

 OMEGA - CORR MATRIX FOR RANDOM EFFECTS - ETAS  *******
         ETA1      ETA2      ETA3
 ETA1
+        3.23E-01
 ETA2
+        6.17E-01  4.99E-01
 ETA3
+        7.18E-01  7.88E-01  4.85E-01

 SIGMA - CORR MATRIX FOR RANDOM EFFECTS - EPSILONS  ***
         EPS1      EPS2
 EPS1
+        2.12E-01
 EPS2
+        0.00E+00  2.69E-01

 ********************               FIRST ORDER CONDITIONAL ESTIMATION WITH INTERACTION              ********************
 ********************                            STANDARD ERROR OF ESTIMATE                          ********************

 THETA - VECTOR OF FIXED EFFECTS PARAMETERS   *********
         TH 1      TH 2      TH 3      TH 4      TH 5
         3.05E+00  9.43E-01  8.28E+00  1.81E+00  1.14E-01

 OMEGA - COV MATRIX FOR RANDOM EFFECTS - ETAS  ********
         ETA1      ETA2      ETA3
 ETA1
+        3.83E-02
 ETA2
+        4.55E-02  8.14E-02
 ETA3
+        3.98E-02  6.78E-02  7.49E-02

 SIGMA - COV MATRIX FOR RANDOM EFFECTS - EPSILONS  ****
         EPS1      EPS2
 EPS1
+        7.02E-03
 EPS2
+       .........  1.13E-02

 OMEGA - CORR MATRIX FOR RANDOM EFFECTS - ETAS  *******
         ETA1      ETA2      ETA3
 ETA1
+        5.93E-02
 ETA2
+        1.88E-01  8.16E-02
 ETA3
+        1.16E-01  1.09E-01  7.73E-02

 SIGMA - CORR MATRIX FOR RANDOM EFFECTS - EPSILONS  ***
         EPS1      EPS2
 EPS1
+        1.66E-02
 EPS2
+       .........  2.11E-02

 ********************               FIRST ORDER CONDITIONAL ESTIMATION WITH INTERACTION              ********************
 ********************                          COVARIANCE MATRIX OF ESTIMATE                         ********************

            TH 1      TH 2      TH 3      TH 4      TH 5      OM11      OM12      OM13      OM22      OM23      OM33      SG11
             SG12      SG22
 TH 1
+        9.28E+00
 TH 2
+        1.70E+00  8.90E-01
 TH 3
+        1.53E+01  4.85E+00  6.86E+01
 TH 4
+        3.27E+00  1.32E+00  1.32E+01  3.27E+00
 TH 5
+        8.55E-02  8.58E-03 -1.44E-01  3.75E-02  1.30E-02
 OM11
+       -2.27E-02  8.99E-03 -1.50E-01 -1.60E-02 -2.34E-05  1.46E-03
 OM12
+        4.79E-02  1.97E-02  2.17E-02  1.71E-02  2.58E-03  6.55E-04  2.07E-03
 OM13
+       -5.16E-02  7.39E-03 -8.31E-02 -3.28E-03  4.79E-04  1.01E-03  7.46E-04  1.58E-03
 OM22
+        7.73E-02  1.78E-02  8.28E-02  3.90E-02  5.85E-03  3.72E-04  3.00E-03  8.64E-04  6.63E-03
 OM23
+        9.38E-03  1.81E-02  1.07E-01  3.39E-02  3.22E-03  9.29E-05  1.89E-03  1.48E-03  4.21E-03  4.60E-03
 OM33
+       -6.59E-02  1.45E-02  1.09E-01  1.78E-02 -1.68E-03  3.67E-04  6.12E-04  2.10E-03  1.16E-03  3.63E-03  5.61E-03
 SG11
+        1.18E-02  5.40E-03  2.47E-02  7.64E-03  1.19E-04  5.99E-05  5.68E-05  3.66E-05 -4.03E-05  3.03E-06 -1.30E-05  4.93E-05
 SG12
+       ......... ......... ......... ......... ......... ......... ......... ......... ......... ......... ......... .........
         .........
 SG22
+       -7.42E-03  3.51E-03  1.07E-02  5.78E-03 -2.85E-04  1.63E-04 -1.10E-04  1.65E-04 -7.77E-05  9.16E-05  2.53E-04  2.43E-05
         .........  1.29E-04

 ********************               FIRST ORDER CONDITIONAL ESTIMATION WITH INTERACTION              ********************
 ********************                          CORRELATION MATRIX OF ESTIMATE                        ********************

            TH 1      TH 2      TH 3      TH 4      TH 5      OM11      OM12      OM13      OM22      OM23      OM33      SG11
             SG12      SG22
 TH 1
+        3.05E+00
 TH 2
+        5.90E-01  9.43E-01
 TH 3
+        6.08E-01  6.21E-01  8.28E+00
 TH 4
+        5.94E-01  7.72E-01  8.79E-01  1.81E+00
 TH 5
+        2.46E-01  7.98E-02 -1.53E-01  1.82E-01  1.14E-01
 OM11
+       -1.95E-01  2.49E-01 -4.72E-01 -2.31E-01 -5.36E-03  3.83E-02
 OM12
+        3.46E-01  4.58E-01  5.77E-02  2.08E-01  4.98E-01  3.77E-01  4.55E-02
 OM13
+       -4.26E-01  1.97E-01 -2.52E-01 -4.55E-02  1.06E-01  6.67E-01  4.12E-01  3.98E-02
 OM22
+        3.12E-01  2.32E-01  1.23E-01  2.65E-01  6.30E-01  1.19E-01  8.10E-01  2.67E-01  8.14E-02
 OM23
+        4.54E-02  2.83E-01  1.90E-01  2.76E-01  4.16E-01  3.58E-02  6.12E-01  5.49E-01  7.62E-01  6.78E-02
 OM33
+       -2.89E-01  2.06E-01  1.76E-01  1.32E-01 -1.97E-01  1.28E-01  1.80E-01  7.03E-01  1.90E-01  7.14E-01  7.49E-02
 SG11
+        5.51E-01  8.16E-01  4.24E-01  6.02E-01  1.49E-01  2.23E-01  1.78E-01  1.31E-01 -7.05E-02  6.37E-03 -2.47E-02  7.02E-03
 SG12
+       ......... ......... ......... ......... ......... ......... ......... ......... ......... ......... ......... .........
         .........
 SG22
+       -2.15E-01  3.28E-01  1.14E-01  2.82E-01 -2.20E-01  3.76E-01 -2.12E-01  3.66E-01 -8.42E-02  1.19E-01  2.98E-01  3.05E-01
         .........  1.13E-02
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 Elapsed finaloutput time in seconds:     2.60
 #CPUT: Total CPU Time in Seconds,      169.813
