08.03.2025
11:40
$PROBLEM ZERBAXA

$INPUT ID NUM TIME DV AMT RATE ADDL II CMT MDV EVID HEIGHT BW SEX AGE SOFA PCT ECMO CRRT ELWI CI CRE ALB PROTEIN

$DATA ..\..\..\..\data\derived\RawData.csv IGNORE=I

$SUBROUTINE ADVAN5 TRANS1

$MODEL
COMP=(DEPOT1)  ;1-CEFTOLOZANE CENTR
COMP=(PER1)    ;2-CEFTOLOZANE PERIPH
COMP=(DEPOT2)  ;3-TAZOBACTAM CENTR
COMP=(PER2)    ;4-TAZOBACTAM PERIPH
$PK

   BSA =  0.20247*(HEIGHT/100)**0.725*BW**0.425 ;(DuBois & DuBois)
   CLCR = (140-AGE)*BW/72/CRE*0.85**(SEX)       ;(Cockcroft-Gault formula)
   CO = CI*BSA;

   V1C = THETA(1)*EXP(ETA(1))
   CLC = THETA(2)*EXP(ETA(2))
   V2C = THETA(3)*EXP(ETA(3))
   QC  = THETA(4)*EXP(ETA(4))
   V1T = THETA(5)*EXP(ETA(5))
   CLT = THETA(6)*EXP(ETA(6))
   V2T = THETA(7)*EXP(ETA(7))
   QT  = THETA(8)*EXP(ETA(8))


K10 = CLC/V1C
K12 = QC/V1C
K21 = QC/V2C
K30 = CLT/V1T
K34 = QT/V1T
K43 = QT/V2T

$ERROR
IF(CMT.EQ.1) THEN
IPRED=A(1)/V1C
Y=IPRED*(1+EPS(1))
ENDIF
IF(CMT.EQ.3) THEN
IPRED=A(3)/V1T
Y=IPRED*(1+EPS(2))
ENDIF

$THETA
(0, 30.2)    ;THETA1 V1C  [L]
(0, 6.28)    ;THETA2 CLC  [L/h]
(0, 55.4)    ;THETA3 V2C  [L]
(0, 5.9)     ;THETA4 QC   [L/h]
(0, 50)      ;THETA5 V1T  [L]
(0, 16.8)    ;THETA6 CLT  [L/h]
(0, 3)       ;THETA7 V2T  [L]
(0, 20)      ;THETA8 QT   [L/h]

$OMEGA
0 FIX         ;11 ETA-V1C
0.1           ;22 ETA-CLC
0 FIX         ;33 ETA-V2C
0 FIX         ;44 ETA-QC

$OMEGA
0.2                ;55 ETA-V1T
0.2            ;66 ETA-CLT

$OMEGA
0 FIX    ;77 ETA-V2T
0 FIX    ;88 ETA-QT

;--------SIGMAS
$SIGMA 0.2 ; 11 PROPC, %
$SIGMA 0.2 ; 22 PROPT, %

$ESTIMATION METHOD=1 INTER NOABORT MAXEVAL=9990 NSIG=3 SIGL=9 PRINT=2
$COV

$TABLE ID NUM TIME MDV IPRED CWRES EVID CMT NPDE
NOPRINT ONEHEADER FILE=SDTAB.DAT

$TABLE ID NUM V1C CLC V1T CLT ETA2 ETA5 ETA6
NOAPPEND NOPRINT ONEHEADER FILE=PATAB.DAT

$TABLE ID NUM HEIGHT CLCR BW AGE SOFA PCT CRRT ELWI CI CRE ALB PROTEIN CO BSA
NOAPPEND NOPRINT ONEHEADER FILE=COTAB.DAT

$TABLE ID NUM SEX ECMO
NOAPPEND NOPRINT ONEHEADER FILE=CATAB.DAT

NM-TRAN MESSAGES
 WARNINGS AND ERRORS (IF ANY) FOR PROBLEM    1
 (WARNING  2) NM-TRAN INFERS THAT THE DATA ARE POPULATION.
 (WARNING  3) THERE MAY BE AN ERROR IN THE ABBREVIATED CODE. THE FOLLOWING
 ONE OR MORE RANDOM VARIABLES ARE DEFINED WITH "IF" STATEMENTS THAT DO NOT
 PROVIDE DEFINITIONS FOR BOTH THE "THEN" AND "ELSE" CASES. IF ALL
 CONDITIONS FAIL, THE VALUES OF THESE VARIABLES WILL BE ZERO.
   IPRED Y
 LIM VALUES MAXLIM ASSESSED BY NMTRAN: 1,2,3,4,5,6,7,8,10,11,13,15,16
Note: Analytical 2nd Derivatives are constructed in FSUBS but are never used.
      You may insert $ABBR DERIV2=NO after the first $PROB to save FSUBS construction and compilation time

1NONLINEAR MIXED EFFECTS MODEL PROGRAM (NONMEM) VERSION 7.5.1
 ORIGINALLY DEVELOPED BY STUART BEAL, LEWIS SHEINER, AND ALISON BOECKMANN
 CURRENT DEVELOPERS ARE ROBERT BAUER, ICON DEVELOPMENT SOLUTIONS,
 AND ALISON BOECKMANN. IMPLEMENTATION, EFFICIENCY, AND STANDARDIZATION
 PERFORMED BY NOUS INFOSYSTEMS.
 PROBLEM NO.:         1
 ZERBAXA
 TOT. NO. OF OBS RECS:      191
 TOT. NO. OF INDIVIDUALS:       13
 GENERAL LINEAR KINETICS MODEL (ADVAN5)
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 #TBLN:      1
 #METH: First Order Conditional Estimation with Interaction
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
 #TERM:
0MINIMIZATION SUCCESSFUL
 NO. OF FUNCTION EVALUATIONS USED:      538
 NO. OF SIG. DIGITS IN FINAL EST.:  3.0

 ETABAR IS THE ARITHMETIC MEAN OF THE ETA-ESTIMATES,
 AND THE P-VALUE IS GIVEN FOR THE NULL HYPOTHESIS THAT THE TRUE MEAN IS 0.

 ETABAR:         0.0000E+00  1.4567E-02  0.0000E+00  0.0000E+00 -1.0454E-02  5.8196E-03  0.0000E+00  0.0000E+00
 SE:             0.0000E+00  1.7747E-01  0.0000E+00  0.0000E+00  1.7192E-01  1.0932E-01  0.0000E+00  0.0000E+00
 N:                      13          13          13          13          13          13          13          13

 P VAL.:         1.0000E+00  9.3458E-01  1.0000E+00  1.0000E+00  9.5151E-01  9.5754E-01  1.0000E+00  1.0000E+00

 ETASHRINKSD(%)  0.0000E+00  4.2917E+00  0.0000E+00  0.0000E+00  1.2961E+01  2.7518E+00  0.0000E+00  0.0000E+00
 ETASHRINKVR(%)  0.0000E+00  8.3992E+00  0.0000E+00  0.0000E+00  2.4242E+01  5.4279E+00  0.0000E+00  0.0000E+00
 EBVSHRINKSD(%)  0.0000E+00  2.5930E+00  0.0000E+00  0.0000E+00  1.0671E+01  2.8010E+00  0.0000E+00  0.0000E+00
 EBVSHRINKVR(%)  0.0000E+00  5.1188E+00  0.0000E+00  0.0000E+00  2.0204E+01  5.5236E+00  0.0000E+00  0.0000E+00
 RELATIVEINF(%)  0.0000E+00  9.4881E+01  0.0000E+00  0.0000E+00  7.9688E+01  9.4348E+01  0.0000E+00  0.0000E+00
 EPSSHRINKSD(%)  4.5835E+00  1.0892E+01
 EPSSHRINKVR(%)  8.9570E+00  2.0597E+01


 TOTAL DATA POINTS NORMALLY DISTRIBUTED (N):          191
 N*LOG(2PI) CONSTANT TO OBJECTIVE FUNCTION:    351.03451968418494
 OBJECTIVE FUNCTION VALUE WITHOUT CONSTANT:    877.83766042831519
 OBJECTIVE FUNCTION VALUE WITH CONSTANT:       1228.8721801125002
 REPORTED OBJECTIVE FUNCTION DOES NOT CONTAIN CONSTANT

 TOTAL EFFECTIVE ETAS (NIND*NETA):                            39


 #TERE:
 Elapsed estimation  time in seconds:   236.61
 Elapsed covariance  time in seconds:   311.51
 Elapsed postprocess time in seconds:     4.74

 ********************               FIRST ORDER CONDITIONAL ESTIMATION WITH INTERACTION              ********************
 #OBJT:**************                       MINIMUM VALUE OF OBJECTIVE FUNCTION                      ********************
 #OBJV:********************************************      877.838       **************************************************

 ********************               FIRST ORDER CONDITIONAL ESTIMATION WITH INTERACTION              ********************
 ********************                             FINAL PARAMETER ESTIMATE                           ********************

 THETA - VECTOR OF FIXED EFFECTS PARAMETERS   *********
         TH 1      TH 2      TH 3      TH 4      TH 5      TH 6      TH 7      TH 8
         2.53E+01  4.25E+00  4.50E+01  2.89E+00  3.60E+01  1.59E+01  2.11E+01  1.03E+02

 OMEGA - COV MATRIX FOR RANDOM EFFECTS - ETAS  ********
         ETA1      ETA2      ETA3      ETA4      ETA5      ETA6      ETA7      ETA8
 ETA1
+        0.00E+00
 ETA2
+        0.00E+00  4.47E-01
 ETA3
+        0.00E+00  0.00E+00  0.00E+00
 ETA4
+        0.00E+00  0.00E+00  0.00E+00  0.00E+00
 ETA5
+        0.00E+00  0.00E+00  0.00E+00  0.00E+00  5.07E-01
 ETA6
+        0.00E+00  0.00E+00  0.00E+00  0.00E+00  0.00E+00  1.64E-01
 ETA7
+        0.00E+00  0.00E+00  0.00E+00  0.00E+00  0.00E+00  0.00E+00  0.00E+00
 ETA8
+        0.00E+00  0.00E+00  0.00E+00  0.00E+00  0.00E+00  0.00E+00  0.00E+00  0.00E+00

 SIGMA - COV MATRIX FOR RANDOM EFFECTS - EPSILONS  ****
         EPS1      EPS2
 EPS1
+        6.78E-02
 EPS2
+        0.00E+00  7.13E-02

 OMEGA - CORR MATRIX FOR RANDOM EFFECTS - ETAS  *******
         ETA1      ETA2      ETA3      ETA4      ETA5      ETA6      ETA7      ETA8
 ETA1
+        0.00E+00
 ETA2
+        0.00E+00  6.69E-01
 ETA3
+        0.00E+00  0.00E+00  0.00E+00
 ETA4
+        0.00E+00  0.00E+00  0.00E+00  0.00E+00
 ETA5
+        0.00E+00  0.00E+00  0.00E+00  0.00E+00  7.12E-01
 ETA6
+        0.00E+00  0.00E+00  0.00E+00  0.00E+00  0.00E+00  4.05E-01
 ETA7
+        0.00E+00  0.00E+00  0.00E+00  0.00E+00  0.00E+00  0.00E+00  0.00E+00
 ETA8
+        0.00E+00  0.00E+00  0.00E+00  0.00E+00  0.00E+00  0.00E+00  0.00E+00  0.00E+00

 SIGMA - CORR MATRIX FOR RANDOM EFFECTS - EPSILONS  ***
         EPS1      EPS2
 EPS1
+        2.60E-01
 EPS2
+        0.00E+00  2.67E-01

 ********************               FIRST ORDER CONDITIONAL ESTIMATION WITH INTERACTION              ********************
 ********************                            STANDARD ERROR OF ESTIMATE                          ********************

 THETA - VECTOR OF FIXED EFFECTS PARAMETERS   *********
         TH 1      TH 2      TH 3      TH 4      TH 5      TH 6      TH 7      TH 8
         3.38E+00  9.58E-01  1.38E+01  5.85E-01  1.99E+01  1.89E+00  1.46E+01  7.85E+01

 OMEGA - COV MATRIX FOR RANDOM EFFECTS - ETAS  ********
         ETA1      ETA2      ETA3      ETA4      ETA5      ETA6      ETA7      ETA8
 ETA1
+       .........
 ETA2
+       .........  1.84E-01
 ETA3
+       ......... ......... .........
 ETA4
+       ......... ......... ......... .........
 ETA5
+       ......... ......... ......... .........  4.51E-01
 ETA6
+       ......... ......... ......... ......... .........  7.83E-02
 ETA7
+       ......... ......... ......... ......... ......... ......... .........
 ETA8
+       ......... ......... ......... ......... ......... ......... ......... .........

 SIGMA - COV MATRIX FOR RANDOM EFFECTS - EPSILONS  ****
         EPS1      EPS2
 EPS1
+        1.33E-02
 EPS2
+       .........  1.06E-02

 OMEGA - CORR MATRIX FOR RANDOM EFFECTS - ETAS  *******
         ETA1      ETA2      ETA3      ETA4      ETA5      ETA6      ETA7      ETA8
 ETA1
+       .........
 ETA2
+       .........  1.38E-01
 ETA3
+       ......... ......... .........
 ETA4
+       ......... ......... ......... .........
 ETA5
+       ......... ......... ......... .........  3.16E-01
 ETA6
+       ......... ......... ......... ......... .........  9.66E-02
 ETA7
+       ......... ......... ......... ......... ......... ......... .........
 ETA8
+       ......... ......... ......... ......... ......... ......... ......... .........

 SIGMA - CORR MATRIX FOR RANDOM EFFECTS - EPSILONS  ***
         EPS1      EPS2
 EPS1
+        2.55E-02
 EPS2
+       .........  1.99E-02
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 Elapsed finaloutput time in seconds:     1.68
 #CPUT: Total CPU Time in Seconds,      546.609
